# OpenSim document version 40000
InverseKinematicsTool:
  time_range: 11.1 13
  output_motion_file: left.mot
  marker_file: ../../data2022/participant21/car/optitrack/trc/Take 2022-05-06 05.01.29 PM.trc
  IKTaskSet:
    IKMarkerTask HY: apply=true weight=1
    IKMarkerTask RUN: apply=true weight=1
    IKMarkerTask LUN: apply=true weight=1
    IKMarkerTask SJN: apply=true weight=1
    IKMarkerTask GLA: apply=true weight=1
    IKMarkerTask RZF: apply=true weight=1
    IKMarkerTask LZF: apply=true weight=1
    IKMarkerTask RZP: apply=true weight=1
    IKMarkerTask LZP: apply=true weight=1
    IKMarkerTask RCAJ: apply=true weight=100
    IKMarkerTask LCAJ: apply=true weight=100
    IKMarkerTask RC: apply=true weight=1
    IKMarkerTask LC: apply=true weight=1
    IKMarkerTask RN: apply=true weight=1
    IKMarkerTask LN: apply=true weight=1
    IKCoordinateTask [values shared by the 9 below unless stated]: apply=true weight=0.1 value_type=default_value
        value=0
    IKCoordinateTask flex_extension
    IKCoordinateTask lat_bending
    IKCoordinateTask axial_rotation
    IKCoordinateTask gndpitch
    IKCoordinateTask gndroll
    IKCoordinateTask gndyaw
    IKCoordinateTask spine_tx
    IKCoordinateTask spine_ty
    IKCoordinateTask spine_tz
