# OpenSim document version 40000
InverseKinematicsTool:
  time_range: 0.005 29.965
  output_motion_file: ik/Take 2022-05-02 10.14.09 AM_ik.mot
  marker_file: ../../data2022/participant01/car/optitrack/trc/Take 2022-05-02 10.10.44 AM.trc
  IKTaskSet:
    IKMarkerTask HY: apply=true weight=0.001
    IKMarkerTask RUN: apply=true weight=0.001
    IKMarkerTask LUN: apply=true weight=0.001
    IKMarkerTask SJN: apply=true weight=1
    IKMarkerTask GLA: apply=true weight=1
    IKMarkerTask RZF: apply=true weight=1
    IKMarkerTask LZF: apply=true weight=1
    IKMarkerTask RZP: apply=true weight=1
    IKMarkerTask LZP: apply=true weight=1
    IKMarkerTask RCAJ: apply=true weight=1
    IKMarkerTask LCAJ: apply=true weight=1
    IKMarkerTask RC: apply=true weight=1
    IKMarkerTask LC: apply=true weight=1
    IKMarkerTask RN: apply=true weight=0.001
    IKMarkerTask LN: apply=true weight=0.001
    IKCoordinateTask [values shared by the 15 below unless stated]: weight=0.001 value_type=default_value value=0
    IKCoordinateTask gndroll: apply=true
    IKCoordinateTask gndyaw: apply=true
    IKCoordinateTask gndpitch: apply=true weight=0.1
    IKCoordinateTask gndx: apply=gndx_enable weight=1 value_type=manual_value value=gndx_value
    IKCoordinateTask gndy: apply=gndy_enable weight=1 value_type=manual_value value=gndy_value
    IKCoordinateTask gndz: apply=gndz_enable weight=1 value_type=manual_value value=gndz_value
    IKCoordinateTask flex_extension: apply=true
    IKCoordinateTask lat_bending: apply=true
    IKCoordinateTask axial_rotation: apply=true
    IKCoordinateTask pitch2: apply=false
    IKCoordinateTask roll2: apply=false
    IKCoordinateTask yaw2: apply=false
    IKCoordinateTask pitch1: apply=true
    IKCoordinateTask roll1: apply=true
    IKCoordinateTask yaw1: apply=true
