# OpenSim document version 40000
ScaleTool HYOID_Scaled-scaled:
  mass: 74 [kg]
  height: -1
  age: -1
  ModelScaler:
    apply: true
    scaling_order: measurements manualScale
    marker_file: C:/Users/norma/Desktop/WhiplashExperimentProcessing_OpenSim/opensim2022/models/../../data2022/participant01/car/optitrack/trc/Take 2022-05-02 10.10.44 AM.trc
    time_range: 29.96 29.965
    preserve_mass_distribution: true
    MeasurementSet:
      Measurement HeadWidth: apply=true
        MarkerPair: markers=(LZP RZP)
        BodyScale skull: axes=(X Y Z)
        BodyScale jaw: axes=(X Y Z)
      Measurement ShoulderWidth: apply=true
        MarkerPair: markers=(LCAJ RCAJ)
        BodyScale torso: axes=(X Z)
      Measurement NeckLength: apply=true
        MarkerPair: markers=(SJN RZP)
        BodyScale cerv7: axes=(X Y Z)
        BodyScale cerv6: axes=(X Y Z)
        BodyScale cerv5: axes=(X Y Z)
        BodyScale cerv4: axes=(X Y Z)
        BodyScale cerv3: axes=(X Y Z)
        BodyScale cerv2: axes=(X Y Z)
        BodyScale cerv1: axes=(X Y Z)
      Measurement ClavicleLength_L: apply=true
        MarkerPair: markers=(SJN LCAJ)
        BodyScale lscapula: axes=(X Y Z)
        BodyScale lclavicle: axes=(X Y Z)
      Measurement ClavicleLength_R: apply=true
        MarkerPair: markers=(SJN RCAJ)
        BodyScale rscapula: axes=(X Y Z)
        BodyScale rclavicle: axes=(X Y Z)
    ScaleSet:
      Scale: scales=(1 1 1) segment=pelvis apply=true
      Scale: scales=(1 1 1) segment=sacrum apply=true
      Scale: scales=(1 1 1) segment=lumbar5 apply=true
      Scale: scales=(1 1 1) segment=lumbar4 apply=true
      Scale: scales=(1 1 1) segment=lumbar3 apply=true
      Scale: scales=(1 1 1) segment=lumbar2 apply=true
      Scale: scales=(1 1 1) segment=lumbar1 apply=true
  MarkerPlacer:
    apply: true
    marker_file: C:/Users/norma/Desktop/WhiplashExperimentProcessing_OpenSim/opensim2022/models/../../data2022/participant01/car/optitrack/trc/Take 2022-05-02 10.10.44 AM.trc
    time_range: 29.96 29.965
    max_marker_movement: -1
    IKTaskSet:
      IKMarkerTask SJN: apply=true weight=20
      IKMarkerTask GLA: apply=true weight=20
      IKMarkerTask RZF: apply=true weight=10
      IKMarkerTask LZF: apply=true weight=10
      IKMarkerTask RZP: apply=true weight=10
      IKMarkerTask LZP: apply=true weight=10
      IKMarkerTask RCAJ: apply=true weight=10
      IKMarkerTask LCAJ: apply=true weight=10
      IKMarkerTask RC: apply=true weight=0
      IKMarkerTask LC: apply=true weight=0
      IKMarkerTask RN: apply=true weight=0
      IKMarkerTask LN: apply=true weight=0
      IKCoordinateTask [values shared by the 12 below unless stated]: apply=true value_type=manual_value value=0
      IKCoordinateTask gndroll: weight=1
      IKCoordinateTask gndyaw: weight=1
      IKCoordinateTask gndpitch: weight=1
      IKCoordinateTask flex_extension: weight=1
      IKCoordinateTask lat_bending: weight=1
      IKCoordinateTask axial_rotation: weight=1
      IKCoordinateTask pitch2: weight=0.001
      IKCoordinateTask roll2: weight=0.001
      IKCoordinateTask yaw2: weight=0.001
      IKCoordinateTask pitch1: weight=0.001
      IKCoordinateTask roll1: weight=0.001
      IKCoordinateTask yaw1: weight=0.001
