# OpenSim document version 40000
Model subject01_scaled:
  gravity: 0 -9.80665 0
  length_units: meters
  force_units: N
  credits:
    Matthew Millard, University of Stuttgart: 1. Merged the lumbar spine model of Christophy et al with the neck model of Mortensen et al., 2. Corrected the coupling constraint for the yaw direction of the lumbar spine model, 3. Corrected the range of motion of the neck joints to be consistent with the paper. 4. Updated the segment masses to be consistent with the Arnold 2010 leg model: 170 cm tall male thats 82.7 kg in mass. Christophy M, Faruk Senan NA, Lotz JC, O'Reilly OM: Developed the lumbar spine model. Mortensen JD, Vasavada AN, Merryweather AS: Developed the head and neck model.
  publications:
    Christophy M, Faruk Senan NA, Lotz JC, O'Reilly OM (2012). A Musculoskeletal model for the lumbar spine. Biomech Model Mechanobiol 11, 19–34. https://doi.org/10.1007/s10237-011-0290-6 Mortensen JD, Vasavada AN, Merryweather AS (2018) The inclusion of hyoid muscles improve moment generating capacity and dynamic simulations in musculoskeletal models of the head and neck. PLOS ONE 13(6): e0199912. https://doi.org/10.1371/journal.pone.0199912
  Ground
  BodySet:
    Body pelvis: mass=0 [kg] mass_center=(0 0 0) inertia=(0 0 0 0 0 0) meshes=(pelvis_rv.vtp pelvis_lv.vtp)
    Body sacrum: mass=12.24292 mass_center=(0 0 0) inertia=(0.1346009 0.1435743 0.05384035 0 0 0) meshes=sacrum.vtp
    Body lumbar5: mass=2.983047 mass_center=(0.05629965 0.02095105 0) inertia=(0.02187713 0.03167607 0.009798944 0 0 0)
        meshes=lumbar5.vtp
    Body lumbar4: mass=2.942161 mass_center=(0.0178394 0.01885594 0) inertia=(0.02015424 0.02948657 0.009332328 0 0 0)
        meshes=lumbar4.vtp
    Body lumbar3: mass=2.731189 mass_center=(0.01433554 0.01885594 0) inertia=(0.01913127 0.02885843 0.009888678 0 0 0)
        meshes=lumbar3.vtp
    Body lumbar2: mass=2.762262 mass_center=(0.02569352 0.01885594 0) inertia=(0.01957994 0.03018649 0.01060655 0 0 0)
        meshes=lumbar2.vtp
    Body lumbar1: mass=2.742637 mass_center=(0.04085454 0.01780839 0) inertia=(0.01997477 0.03146071 0.01148594 0 0 0)
        meshes=lumbar1.vtp
    Body torso: mass=30.4503 mass_center=(0.004724828 0.2526756 0) inertia=(0.2846922 0.2588111 0.2156759 0 0 0)
        meshes=(thoracic12_s.vtp thoracic11_s.vtp thoracic10_s.vtp thoracic9_s.vtp thoracic8_s.vtp thoracic7_s.vtp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)
    Body rscapula: mass=1.46306 mass_center=(0 0 0) inertia=(1.187712 1.187712 0.5938558 0 0 0) meshes=rscapula.vtp
    Body rclavicle: mass=1.46306 mass_center=(0 0 0) inertia=(1.187712 1.187712 0.5938558 0 0 0) meshes=rclavicle.vtp
    Body lscapula: mass=1.46306 mass_center=(0 0 0) inertia=(1.427757 1.427757 0.7138786 0 0 0) meshes=lscapula.vtp
    Body lclavicle: mass=1.46306 mass_center=(0 0 0) inertia=(1.427757 1.427757 0.7138786 0 0 0) meshes=lclavicle.vtp
    Body cerv7: mass=0.8545509 mass_center=(-0.0002235719 0.007936803 0)
        inertia=(0.03656509 0.1462604 0.03656509 0 0 0) meshes=rotatedcerv7.vtp
    Body cerv6: mass=0.742867 mass_center=(0.0002235719 0.007154302 0) inertia=(0.03656509 0.1462604 0.03656509 0 0 0)
        meshes=cerv6.vtp
    Body cerv5: mass=0.627799 mass_center=(0.000111786 0.007042516 0) inertia=(0.03656509 0.1462604 0.03656509 0 0 0)
        meshes=cerv5.vtp
    Body cerv4: mass=0.6193379 mass_center=(-0.0003353579 0.007489659 0)
        inertia=(0.03656509 0.1462604 0.03656509 0 0 0) meshes=cerv4.vtp
    Body cerv3: mass=0.6142613 mass_center=(-0.0008942877 0.007936803 0)
        inertia=(0.03656509 0.1462604 0.03656509 0 0 0) meshes=cerv3.vtp
    Body cerv2: mass=0.8596274 mass_center=(-0.00111786 0.006595372 0) inertia=(0.03656509 0.1462604 0.03656509 0 0 0)
        meshes=cerv2.vtp
    Body cerv1: mass=0.6836407 mass_center=(0.03487722 0.002123933 0) inertia=(0.03656509 0.1462604 0.03656509 0 0 0)
        meshes=cerv1.vtp
    Body skull: mass=6.291158 mass_center=(0.01658248 0.06038706 0) inertia=(0.02786558 0.02016322 0.03038598 0 0 0)
        meshes=skull.vtp
    Body jaw: mass=0 mass_center=(0 0.04792623 0) inertia=(0 0 0 0 0 0) meshes=jaw.vtp
    ObjectGroup Lumbar_Vertebrae: members=(lumbar1 lumbar2 lumbar3 lumbar4 lumbar5)
  JointSet:
    FreeJoint gndpelvis: socket_parent_frame=ground_offset socket_child_frame=pelvis_offset
      Coordinate gndroll: default_value=0 range=(-3.141593 3.141593) clamped=false
      Coordinate gndyaw: default_value=0 range=(-3.141593 3.141593) clamped=false
      Coordinate gndpitch: default_value=0.384 range=(-3.141593 3.141593) clamped=false
      Coordinate spine_tx: default_value=0 range=(-1 1) clamped=false
      Coordinate spine_ty: default_value=0 range=(-1 1) clamped=false
      Coordinate spine_tz: default_value=0 range=(-1 1) clamped=false
      PhysicalOffsetFrame ground_offset: socket_parent=/ground translation=(0 0 0) [meters]
      PhysicalOffsetFrame pelvis_offset: socket_parent=/bodyset/pelvis translation=(-0.1047552 -0.1571328 0)
    WeldJoint gndsacrum: socket_parent_frame=pelvis_offset socket_child_frame=sacrum_offset
      PhysicalOffsetFrame pelvis_offset: socket_parent=/bodyset/pelvis translation=(0 0 0)
      PhysicalOffsetFrame sacrum_offset: socket_parent=/bodyset/sacrum translation=(0 0 0)
    CustomJoint L5_S1_IVDjnt: socket_parent_frame=sacrum_offset socket_child_frame=lumbar5_offset
      Coordinate flex_extension: default_value=-0.053 range=(-1.22173 0.4537856) clamped=false
      Coordinate lat_bending: default_value=4.318642e-19 range=(-0.4363323 0.4363323) clamped=false
      Coordinate axial_rotation: default_value=-4.163228e-17 range=(-0.7853982 0.7853982) clamped=false
      PhysicalOffsetFrame sacrum_offset: socket_parent=/bodyset/sacrum translation=(-0.1026601 0.07437621 0)
      PhysicalOffsetFrame lumbar5_offset: socket_parent=/bodyset/lumbar5 translation=(0 0 0)
      SpatialTransform: axes_held_at_zero=(translation1 translation2 translation3)
        TransformAxis rotation1: coordinates=flex_extension axis=(0 0 1) LinearFunction(coefficients=0.125 0)
        TransformAxis rotation2: coordinates=lat_bending axis=(1 0 0) LinearFunction(coefficients=0.1356 0)
        TransformAxis rotation3: coordinates=axial_rotation axis=(0 1 0) LinearFunction(coefficients=0.207792 0)
    CustomJoint L4_L5_IVDjnt: socket_parent_frame=lumbar5_offset socket_child_frame=lumbar4_offset
      Coordinate L4_L5_FE: default_value=-0.009805 range=(-99999.9 99999.9) clamped=false
      Coordinate L4_L5_LB: default_value=7.820464e-20 range=(-99999.9 99999.9) clamped=false
      Coordinate L4_L5_AR: default_value=-9.191543e-18 range=(-99999.9 99999.9) clamped=false
      PhysicalOffsetFrame lumbar5_offset: socket_parent=/bodyset/lumbar5 translation=(0.01047552 0.03100755 0)
      PhysicalOffsetFrame lumbar4_offset: socket_parent=/bodyset/lumbar4 translation=(0.001047552 -0.002618881 0)
      SpatialTransform: axes_held_at_zero=(translation1 translation2 translation3)
        TransformAxis rotation1: coordinates=L4_L5_FE axis=(0 0 1) LinearFunction(coefficients=1 0)
        TransformAxis rotation2: coordinates=L4_L5_LB axis=(1 0 0) LinearFunction(coefficients=1 0)
        TransformAxis rotation3: coordinates=L4_L5_AR axis=(0 1 0) LinearFunction(coefficients=1 0)
    CustomJoint L3_L4_IVDjnt: socket_parent_frame=lumbar4_offset socket_child_frame=lumbar3_offset
      Coordinate L3_L4_FE: default_value=-0.010812 range=(-99999.9 99999.9) clamped=false
      Coordinate L3_L4_LB: default_value=1.059501e-19 range=(-99999.9 99999.9) clamped=false
      Coordinate L3_L4_AR: default_value=-9.191543e-18 range=(-99999.9 99999.9) clamped=false
      PhysicalOffsetFrame lumbar4_offset: socket_parent=/bodyset/lumbar4 translation=(0 0.03352167 0)
      PhysicalOffsetFrame lumbar3_offset: socket_parent=/bodyset/lumbar3 translation=(-0.0006285314 -0.001257063 0)
      SpatialTransform: axes_held_at_zero=(translation1 translation2 translation3)
        TransformAxis rotation1: coordinates=L3_L4_FE axis=(0 0 1) LinearFunction(coefficients=1 0)
        TransformAxis rotation2: coordinates=L3_L4_LB axis=(1 0 0) LinearFunction(coefficients=1 0)
        TransformAxis rotation3: coordinates=L3_L4_AR axis=(0 1 0) LinearFunction(coefficients=1 0)
    CustomJoint L2_L3_IVDjnt: socket_parent_frame=lumbar3_offset socket_child_frame=lumbar2_offset
      Coordinate L2_L3_FE: default_value=-0.012243 range=(-99999.9 99999.9) clamped=false
      Coordinate L2_L3_LB: default_value=1.080216e-19 range=(-99999.9 99999.9) clamped=false
      Coordinate L2_L3_AR: default_value=-7.569506e-18 range=(-99999.9 99999.9) clamped=false
      PhysicalOffsetFrame lumbar3_offset: socket_parent=/bodyset/lumbar3 translation=(-0.008380418 0.03268363 0)
      PhysicalOffsetFrame lumbar2_offset: socket_parent=/bodyset/lumbar2 translation=(-0.001361818 -0.004085454 0)
      SpatialTransform: axes_held_at_zero=(translation1 translation2 translation3)
        TransformAxis rotation1: coordinates=L2_L3_FE axis=(0 0 1) LinearFunction(coefficients=1 0)
        TransformAxis rotation2: coordinates=L2_L3_LB axis=(1 0 0) LinearFunction(coefficients=1 0)
        TransformAxis rotation3: coordinates=L2_L3_AR axis=(0 1 0) LinearFunction(coefficients=1 0)
    CustomJoint L1_L2_IVDjnt: socket_parent_frame=lumbar2_offset socket_child_frame=lumbar1_offset
      Coordinate L1_L2_FE: default_value=-0.013515 range=(-99999.9 99999.9) clamped=false
      Coordinate L1_L2_LB: default_value=8.119048e-20 range=(-99999.9 99999.9) clamped=false
      Coordinate L1_L2_AR: default_value=-7.028827e-18 range=(-99999.9 99999.9) clamped=false
      PhysicalOffsetFrame lumbar2_offset: socket_parent=/bodyset/lumbar2 translation=(-0.01047552 0.02618881 0)
      PhysicalOffsetFrame lumbar1_offset: socket_parent=/bodyset/lumbar1 translation=(0.001466573 -0.003980699 0)
      SpatialTransform: axes_held_at_zero=(translation1 translation2 translation3)
        TransformAxis rotation1: coordinates=L1_L2_FE axis=(0 0 1) LinearFunction(coefficients=1 0)
        TransformAxis rotation2: coordinates=L1_L2_LB axis=(1 0 0) LinearFunction(coefficients=1 0)
        TransformAxis rotation3: coordinates=L1_L2_AR axis=(0 1 0) LinearFunction(coefficients=1 0)
    WeldJoint torsojnt: socket_parent_frame=lumbar1_offset socket_child_frame=torso_offset
      PhysicalOffsetFrame lumbar1_offset: socket_parent=/bodyset/lumbar1 translation=(0.002618881 -0.09323215 0)
      PhysicalOffsetFrame torso_offset: socket_parent=/bodyset/torso translation=(0 0 0)
    WeldJoint rscapulajnt: socket_parent_frame=torso_offset socket_child_frame=rscapula_offset
      PhysicalOffsetFrame torso_offset: socket_parent=/bodyset/torso translation=(-0.01951559 0.4057189 0.1643418)
          orientation=(0.174533 -0.296706 -0.174533) [radians]
      PhysicalOffsetFrame rscapula_offset: socket_parent=/bodyset/rscapula translation=(0 0 0)
    WeldJoint rclaviclejnt: socket_parent_frame=torso_offset socket_child_frame=rclavicle_offset
      PhysicalOffsetFrame torso_offset: socket_parent=/bodyset/torso translation=(0.01027137 0.3800405 0.02013879)
          orientation=(0 0.139626 0)
      PhysicalOffsetFrame rclavicle_offset: socket_parent=/bodyset/rclavicle translation=(0 0 0)
    WeldJoint lscapulajnt: socket_parent_frame=torso_offset socket_child_frame=lscapula_offset
      PhysicalOffsetFrame torso_offset: socket_parent=/bodyset/torso translation=(-0.01951559 0.4057189 -0.1643418)
          orientation=(-0.174533 0.296706 -0.174533)
      PhysicalOffsetFrame lscapula_offset: socket_parent=/bodyset/lscapula translation=(0 0 0)
    WeldJoint lclaviclejnt: socket_parent_frame=torso_offset socket_child_frame=lclavicle_offset
      PhysicalOffsetFrame torso_offset: socket_parent=/bodyset/torso translation=(0.01027137 0.3800405 -0.02013879)
          orientation=(0 -0.139626 0)
      PhysicalOffsetFrame lclavicle_offset: socket_parent=/bodyset/lclavicle translation=(0 0 0)
    CustomJoint auxt1jnt: socket_parent_frame=torso_offset socket_child_frame=cerv7_offset
      Coordinate pitch2: default_value=0.06 range=(-0.716 0.716) clamped=true
      Coordinate roll2: default_value=-0.007 range=(-0.585 0.585) clamped=true
      Coordinate yaw2: default_value=0.017 range=(-0.48 0.48) clamped=true
      PhysicalOffsetFrame torso_offset: socket_parent=/bodyset/torso translation=(-0.02054273 0.4005832 0)
      PhysicalOffsetFrame cerv7_offset: socket_parent=/bodyset/cerv7 translation=(0.00764616 -0.006321496 0)
      SpatialTransform: axes_held_at_zero=(translation1 translation2 translation3)
        TransformAxis rotation1: coordinates=pitch2 axis=(0 0 1)
          SimmSpline: x=(-1.74533 1.74533) y=(-0.172788 0.172788)
        TransformAxis rotation2: coordinates=roll2 axis=(1 0 0)
          SimmSpline: x=(-1.74533 1.74533) y=(-0.136136 0.136136)
        TransformAxis rotation3: coordinates=yaw2 axis=(0 1 0)
          SimmSpline: x=(-1.74533 1.74533) y=(-0.109956 0.109956)
    CustomJoint aux7jnt: socket_parent_frame=cerv7_offset socket_child_frame=cerv6_offset
      Coordinate aux7jnt_r3: default_value=0.01122001 range=(-99999.9 99999.9) clamped=false
      Coordinate aux7jnt_r1: default_value=-0.0009589991 range=(-99999.9 99999.9) clamped=false
      Coordinate aux7jnt_r2: default_value=0.003196 range=(-99999.9 99999.9) clamped=false
      PhysicalOffsetFrame cerv7_offset: socket_parent=/bodyset/cerv7 translation=(0.01481835 0.0138391 0)
      PhysicalOffsetFrame cerv6_offset: socket_parent=/bodyset/cerv6 translation=(0.01052912 -0.004544099 0)
      SpatialTransform: axes_held_at_zero=(translation1 translation2 translation3)
        TransformAxis rotation1: coordinates=aux7jnt_r3 axis=(0 0 1) LinearFunction(coefficients=1 0)
        TransformAxis rotation2: coordinates=aux7jnt_r1 axis=(1 0 0) LinearFunction(coefficients=1 0)
        TransformAxis rotation3: coordinates=aux7jnt_r2 axis=(0 1 0) LinearFunction(coefficients=1 0)
    CustomJoint aux6jnt: socket_parent_frame=cerv6_offset socket_child_frame=cerv5_offset
      Coordinate aux6jnt_r3: default_value=0.01319998 range=(-99999.9 99999.9) clamped=false
      Coordinate aux6jnt_r1: default_value=-0.001099001 range=(-99999.9 99999.9) clamped=false
      Coordinate aux6jnt_r2: default_value=0.003722998 range=(-99999.9 99999.9) clamped=false
      PhysicalOffsetFrame cerv6_offset: socket_parent=/bodyset/cerv6 translation=(0.01101092 0.01089913 0)
      PhysicalOffsetFrame cerv5_offset: socket_parent=/bodyset/cerv5 translation=(0.006338264 -0.009110556 0)
      SpatialTransform: axes_held_at_zero=(translation1 translation2 translation3)
        TransformAxis rotation1: coordinates=aux6jnt_r3 axis=(0 0 1) LinearFunction(coefficients=1 0)
        TransformAxis rotation2: coordinates=aux6jnt_r1 axis=(1 0 0) LinearFunction(coefficients=1 0)
        TransformAxis rotation3: coordinates=aux6jnt_r2 axis=(0 1 0) LinearFunction(coefficients=1 0)
    CustomJoint aux5jnt: socket_parent_frame=cerv5_offset socket_child_frame=cerv4_offset
      Coordinate aux5jnt_r3: default_value=0.01319998 range=(-99999.9 99999.9) clamped=false
      Coordinate aux5jnt_r1: default_value=-0.001511999 range=(-99999.9 99999.9) clamped=false
      Coordinate aux5jnt_r2: default_value=0.003722998 range=(-99999.9 99999.9) clamped=false
      PhysicalOffsetFrame cerv5_offset: socket_parent=/bodyset/cerv5 translation=(0.009423557 0.008328054 0)
      PhysicalOffsetFrame cerv4_offset: socket_parent=/bodyset/cerv4 translation=(0.005611655 -0.01310131 0)
      SpatialTransform: axes_held_at_zero=(translation1 translation2 translation3)
        TransformAxis rotation1: coordinates=aux5jnt_r3 axis=(0 0 1) LinearFunction(coefficients=1 0)
        TransformAxis rotation2: coordinates=aux5jnt_r1 axis=(1 0 0) LinearFunction(coefficients=1 0)
        TransformAxis rotation3: coordinates=aux5jnt_r2 axis=(0 1 0) LinearFunction(coefficients=1 0)
    CustomJoint aux4jnt: socket_parent_frame=cerv4_offset socket_child_frame=cerv3_offset
      Coordinate aux4jnt_r3: default_value=0.009899984 range=(-99999.9 99999.9) clamped=false
      Coordinate aux4jnt_r1: default_value=-0.001511999 range=(-99999.9 99999.9) clamped=false
      Coordinate aux4jnt_r2: default_value=0.003722998 range=(-99999.9 99999.9) clamped=false
      PhysicalOffsetFrame cerv4_offset: socket_parent=/bodyset/cerv4 translation=(0.008182732 0.007131944 0)
      PhysicalOffsetFrame cerv3_offset: socket_parent=/bodyset/cerv3 translation=(0.005265119 -0.01008309 0)
      SpatialTransform: axes_held_at_zero=(translation1 translation2 translation3)
        TransformAxis rotation1: coordinates=aux4jnt_r3 axis=(0 0 1) LinearFunction(coefficients=1 0)
        TransformAxis rotation2: coordinates=aux4jnt_r1 axis=(1 0 0) LinearFunction(coefficients=1 0)
        TransformAxis rotation3: coordinates=aux4jnt_r2 axis=(0 1 0) LinearFunction(coefficients=1 0)
    CustomJoint aux3jnt: socket_parent_frame=cerv3_offset socket_child_frame=cerv2_offset
      Coordinate aux3jnt_r3: default_value=0.006599989 range=(-99999.9 99999.9) clamped=false
      Coordinate aux3jnt_r1: default_value=-0.001372001 range=(-99999.9 99999.9) clamped=false
      Coordinate aux3jnt_r2: default_value=0.001598 range=(-99999.9 99999.9) clamped=false
      PhysicalOffsetFrame cerv3_offset: socket_parent=/bodyset/cerv3 translation=(0.005868763 0.00565637 0)
      PhysicalOffsetFrame cerv2_offset: socket_parent=/bodyset/cerv2 translation=(0.006069978 -0.01255356 0)
      SpatialTransform: axes_held_at_zero=(translation1 translation2 translation3)
        TransformAxis rotation1: coordinates=aux3jnt_r3 axis=(0 0 1) LinearFunction(coefficients=1 0)
        TransformAxis rotation2: coordinates=aux3jnt_r1 axis=(1 0 0) LinearFunction(coefficients=1 0)
        TransformAxis rotation3: coordinates=aux3jnt_r2 axis=(0 1 0) LinearFunction(coefficients=1 0)
    CustomJoint aux2jnt: socket_parent_frame=cerv2_offset socket_child_frame=cerv1_offset
      Coordinate pitch1: default_value=0.008999999 range=(-0.349 0.349) clamped=true
      Coordinate roll1: default_value=-2.576644e-11 range=(-0.113 0.113) clamped=true
      Coordinate yaw1: default_value=-0.032 range=(-0.672 0.672) clamped=true
      PhysicalOffsetFrame cerv2_offset: socket_parent=/bodyset/cerv2 translation=(0.007702053 0.02378805 0)
      PhysicalOffsetFrame cerv1_offset: socket_parent=/bodyset/cerv1 translation=(0.04745314 0.003934866 0)
      SpatialTransform: axes_held_at_zero=(translation1 translation2 translation3)
        TransformAxis rotation1: coordinates=pitch1 axis=(0 0 1)
          SimmSpline: x=(-1.74533 1.74533) y=(-0.774926 0.774926)
        TransformAxis rotation2: coordinates=roll1 axis=(1 0 0)
          SimmSpline: x=(-1.74533 1.74533) y=(-0.872665 0.872665)
        TransformAxis rotation3: coordinates=yaw1 axis=(0 1 0)
          SimmSpline: x=(-1.74533 1.74533) y=(-1.5516 1.5516)
    CustomJoint aux1jnt: socket_parent_frame=cerv1_offset socket_child_frame=skull_offset
      Coordinate aux1jnt_r3: default_value=0.005003997 range=(-99999.9 99999.9) clamped=false
      Coordinate aux1jnt_r1: default_value=-1.288326e-11 range=(-99999.9 99999.9) clamped=false
      Coordinate aux1jnt_r2: default_value=-0.003552007 range=(-99999.9 99999.9) clamped=false
      PhysicalOffsetFrame cerv1_offset: socket_parent=/bodyset/cerv1 translation=(0.04845921 0.01667847 0)
      PhysicalOffsetFrame skull_offset: socket_parent=/bodyset/skull translation=(0 0 0)
      SpatialTransform: axes_held_at_zero=(translation1 translation2 translation3)
        TransformAxis rotation1: coordinates=aux1jnt_r3 axis=(0 0 1) LinearFunction(coefficients=1 0)
        TransformAxis rotation2: coordinates=aux1jnt_r1 axis=(1 0 0) LinearFunction(coefficients=1 0)
        TransformAxis rotation3: coordinates=aux1jnt_r2 axis=(0 1 0) LinearFunction(coefficients=1 0)
    WeldJoint jawjnt: socket_parent_frame=skull_offset socket_child_frame=jaw_offset
      PhysicalOffsetFrame skull_offset: socket_parent=/bodyset/skull translation=(0 0 0)
      PhysicalOffsetFrame jaw_offset: socket_parent=/bodyset/jaw translation=(0 0 0)
  ConstraintSet:
    CoordinateCouplerConstraint L4_L5_FE_con: independent_coordinate_names=flex_extension
        dependent_coordinate_name=L4_L5_FE scale_factor=1
        coupled_coordinates_function=LinearFunction(coefficients=0.185 0)
    CoordinateCouplerConstraint L4_L5_AR_con: independent_coordinate_names=axial_rotation
        dependent_coordinate_name=L4_L5_AR scale_factor=1
        coupled_coordinates_function=LinearFunction(coefficients=0.220779 0)
    CoordinateCouplerConstraint L4_L5_LB_con: independent_coordinate_names=lat_bending
        dependent_coordinate_name=L4_L5_LB scale_factor=1
        coupled_coordinates_function=LinearFunction(coefficients=0.181086 0)
    CoordinateCouplerConstraint L3_L4_FE_con: independent_coordinate_names=flex_extension
        dependent_coordinate_name=L3_L4_FE scale_factor=1
        coupled_coordinates_function=LinearFunction(coefficients=0.204 0)
    CoordinateCouplerConstraint L3_L4_AR_con: independent_coordinate_names=axial_rotation
        dependent_coordinate_name=L3_L4_AR scale_factor=1
        coupled_coordinates_function=LinearFunction(coefficients=0.220779 0)
    CoordinateCouplerConstraint L3_L4_LB_con: independent_coordinate_names=lat_bending
        dependent_coordinate_name=L3_L4_LB scale_factor=1
        coupled_coordinates_function=LinearFunction(coefficients=0.245332 0)
    CoordinateCouplerConstraint L2_L3_FE_con: independent_coordinate_names=flex_extension
        dependent_coordinate_name=L2_L3_FE scale_factor=1
        coupled_coordinates_function=LinearFunction(coefficients=0.231 0)
    CoordinateCouplerConstraint L2_L3_AR_con: independent_coordinate_names=axial_rotation
        dependent_coordinate_name=L2_L3_AR scale_factor=1
        coupled_coordinates_function=LinearFunction(coefficients=0.181818 0)
    CoordinateCouplerConstraint L2_L3_LB_con: independent_coordinate_names=lat_bending
        dependent_coordinate_name=L2_L3_LB scale_factor=1
        coupled_coordinates_function=LinearFunction(coefficients=0.250128 0)
    CoordinateCouplerConstraint L1_L2_FE_con: independent_coordinate_names=flex_extension
        dependent_coordinate_name=L1_L2_FE scale_factor=1
        coupled_coordinates_function=LinearFunction(coefficients=0.255 0)
    CoordinateCouplerConstraint L1_L2_AR_con: independent_coordinate_names=axial_rotation
        dependent_coordinate_name=L1_L2_AR scale_factor=1
        coupled_coordinates_function=LinearFunction(coefficients=0.168831 0)
    CoordinateCouplerConstraint L1_L2_LB_con: independent_coordinate_names=lat_bending
        dependent_coordinate_name=L1_L2_LB scale_factor=1
        coupled_coordinates_function=LinearFunction(coefficients=0.188 0)
    CoordinateCouplerConstraint aux7jnt_r1_con: independent_coordinate_names=roll2 dependent_coordinate_name=aux7jnt_r1
      coupled_coordinates_function: SimmSpline: x=(-1.74533 1.74533) y=(-0.23911 0.23911)
    CoordinateCouplerConstraint aux7jnt_r2_con: independent_coordinate_names=yaw2 dependent_coordinate_name=aux7jnt_r2
      coupled_coordinates_function: SimmSpline: x=(-1.74533 1.74533) y=(-0.328122 0.328122)
    CoordinateCouplerConstraint aux7jnt_r3_con: independent_coordinate_names=pitch2
        dependent_coordinate_name=aux7jnt_r3
      coupled_coordinates_function: SimmSpline: x=(-1.74533 1.74533) y=(-0.326377 0.326377)
    CoordinateCouplerConstraint aux6jnt_r1_con: independent_coordinate_names=roll2 dependent_coordinate_name=aux6jnt_r1
      coupled_coordinates_function: SimmSpline: x=(-1.74533 1.74533) y=(-0.274017 0.274017)
    CoordinateCouplerConstraint aux6jnt_r2_con: independent_coordinate_names=yaw2 dependent_coordinate_name=aux6jnt_r2
      coupled_coordinates_function: SimmSpline: x=(-1.74533 1.74533) y=(-0.382227 0.382227)
    CoordinateCouplerConstraint aux6jnt_r3_con: independent_coordinate_names=pitch2
        dependent_coordinate_name=aux6jnt_r3
      coupled_coordinates_function: SimmSpline: x=(-1.74533 1.74533) y=(-0.383972 0.383972)
    CoordinateCouplerConstraint aux5jnt_r1_con: independent_coordinate_names=roll2 dependent_coordinate_name=aux5jnt_r1
      coupled_coordinates_function: SimmSpline: x=(-1.74533 1.74533) y=(-0.376991 0.376991)
    CoordinateCouplerConstraint aux5jnt_r2_con: independent_coordinate_names=yaw2 dependent_coordinate_name=aux5jnt_r2
      coupled_coordinates_function: SimmSpline: x=(-1.74533 1.74533) y=(-0.382227 0.382227)
    CoordinateCouplerConstraint aux5jnt_r3_con: independent_coordinate_names=pitch2
        dependent_coordinate_name=aux5jnt_r3
      coupled_coordinates_function: SimmSpline: x=(-1.74533 1.74533) y=(-0.383972 0.383972)
    CoordinateCouplerConstraint aux4jnt_r1_con: independent_coordinate_names=roll2 dependent_coordinate_name=aux4jnt_r1
      coupled_coordinates_function: SimmSpline: x=(-1.74533 1.74533) y=(-0.376991 0.376991)
    CoordinateCouplerConstraint aux4jnt_r2_con: independent_coordinate_names=yaw2 dependent_coordinate_name=aux4jnt_r2
      coupled_coordinates_function: SimmSpline: x=(-1.74533 1.74533) y=(-0.382227 0.382227)
    CoordinateCouplerConstraint aux4jnt_r3_con: independent_coordinate_names=pitch2
        dependent_coordinate_name=aux4jnt_r3
      coupled_coordinates_function: SimmSpline: x=(-1.74533 1.74533) y=(-0.287979 0.287979)
    CoordinateCouplerConstraint aux3jnt_r1_con: independent_coordinate_names=roll2 dependent_coordinate_name=aux3jnt_r1
      coupled_coordinates_function: SimmSpline: x=(-1.74533 1.74533) y=(-0.342085 0.342085)
    CoordinateCouplerConstraint aux3jnt_r2_con: independent_coordinate_names=yaw2 dependent_coordinate_name=aux3jnt_r2
      coupled_coordinates_function: SimmSpline: x=(-1.74533 1.74533) y=(-0.164061 0.164061)
    CoordinateCouplerConstraint aux3jnt_r3_con: independent_coordinate_names=pitch2
        dependent_coordinate_name=aux3jnt_r3
      coupled_coordinates_function: SimmSpline: x=(-1.74533 1.74533) y=(-0.191986 0.191986)
    CoordinateCouplerConstraint aux1jnt_r1_con: independent_coordinate_names=roll1 dependent_coordinate_name=aux1jnt_r1
      coupled_coordinates_function: SimmSpline: x=(-1.74533 1.74533) y=(-0.872665 0.872665)
    CoordinateCouplerConstraint aux1jnt_r2_con: independent_coordinate_names=yaw1 dependent_coordinate_name=aux1jnt_r2
      coupled_coordinates_function: SimmSpline: x=(-1.74533 1.74533) y=(-0.193732 0.193732)
    CoordinateCouplerConstraint aux1jnt_r3_con: independent_coordinate_names=pitch1
        dependent_coordinate_name=aux1jnt_r3
      coupled_coordinates_function: SimmSpline: x=(-1.74533 1.74533) y=(-0.970403 0.970403)
  MarkerSet:
    Marker HY: cerv5 (0.05723101 -0.004801747 0.008309287)
    Marker RUN: cerv2 (-0.004746588 0.008519491 0.07833611)
    Marker LUN: cerv2 (0.009279669 -0.004300815 -0.0677485)
    Marker SJN: torso (0.02199321 0.3722013 0.0006374148)
    Marker GLA: skull (0.1087481 0.06315727 0.0007193256)
    Marker RZF: skull (0.07964152 0.02434827 0.06284695)
    Marker LZF: skull (0.08088605 0.01196021 -0.05927153)
    Marker RZP: skull (0.03912458 0.02095581 0.08289394)
    Marker LZP: skull (0.03324022 0.02210181 -0.07994282)
    Marker RCAJ: rscapula (0.01388927 0.004157303 -0.009302158)
    Marker LCAJ: lscapula (0.01779256 0.0008498953 0.007200696)
    Marker RC: rclavicle (-0.004519541 0.009650975 0.04648838)
    Marker LC: lclavicle (-0.004793549 0.01380156 -0.04379315)
    Marker RN: cerv5 (-0.01009579 -0.007806369 0.07249229)
    Marker LN: cerv5 (0.005015253 -0.006273576 -0.05941912)
